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/BATCH
/COM,ANSYS RELEASE Release 17.0      BUILD 17.0      UP20151214       13:52:01
/input,menust,tmp,''
/GST,ON
/PLO,INFO,3
/GRO,CURL,ON
/CPLANE,1
WPSTYLE,,,,,,,,0
lab1.mac
lab1
key=1
/NOPR
KEYW,PR_SET,1
KEYW,PR_STRUC,1
KEYW,PR_THERM,0
KEYW,PR_FLUID,0
KEYW,PR_ELMAG,0
KEYW,MAGNOD,0
KEYW,MAGEDG,0
KEYW,MAGHFE,0
KEYW,MAGELC,0
KEYW,PR_MULTI,0
/GO
/COM,
/COM,Preferences for GUI filtering have been set to display:
/COM,  Structural
FINISH
! /EXIT,NOSAV
/BATCH
/COM,ANSYS RELEASE Release 17.0      BUILD 17.0      UP20151214       14:06:06
/input,menust,tmp,''
/GST,ON
/PLO,INFO,3
/GRO,CURL,ON
/CPLANE,1
WPSTYLE,,,,,,,,0
/NOPR
KEYW,PR_SET,1
KEYW,PR_STRUC,1
KEYW,PR_THERM,0
KEYW,PR_FLUID,0
KEYW,PR_ELMAG,0
KEYW,MAGNOD,0
KEYW,MAGEDG,0
KEYW,MAGHFE,0
KEYW,MAGELC,0
KEYW,PR_MULTI,0
/GO
/COM,
/COM,Preferences for GUI filtering have been set to display:
/COM,  Structural
*SET,L1,20
*SET,L2,40
*SET,L3,60
*SET,R1,20
*SET,R2,R1
*SET,H1,30
*SET,B,6
*SET,H2,1
*SET,E,2e5
*SET,mu,0.3
*SET,F,5
/PREP7
ET,1,BEAM188
ET,1,BEAM188
MP,EX,1,E
MP,PRXY,1,MU
SECTYPE,1, BEAM, RECT
SECDATA,H2,B
K,1,0,0,0
L,1,2
ALLSEL,ALL
GPLOT
K,2,L1,0,0
GPLOT
/NUMBER,0
/NUMBER,0
GPLOT
LPLOT
NPLOT
GPLOT
KPLOT
/NUMBER,0
/PSF,DEFA, ,1,0,1
/PBF,DEFA, ,1
/PSYMB,CS,0
/PSYMB,NDIR,0
/PSYMB,ESYS,0
/PSYMB,LDIV,0
/PSYMB,LDIR,0
/PSYMB,ADIR,0
/PSYMB,ECON,0
/PSYMB,XNODE,0
/PSYMB,DOT,1
/PSYMB,PCONV,
/PSYMB,LAYR,0
/PSYMB,FBCS,0
/PBC,ALL, ,1
K,2,L1,0,0,
GPLOT
ALLSEL,ALL
K,3,L1+L2,H1,0
K,3,L1+L2,-H1,0
K,4,L1+L2+L3,-H1,0
L,1,2
L,2,3
L,3,4
LFILLT,1,2,R1
LFILLT,2,3,R2
LESIZE,ALL,L1/20
LMESH,ALL
GPLOT
DK,1,ALL,0
FK,4,FY,-F
ANTYPE,0
NLGEOM,1
NSUBST,100,1000,100
TIME,1
OUTRES,ALL,ALL
FINISH
/SOL
/STATUS,SOLU
SOLVE
FINISH
/POST1
PLDISP,1
/RGB,INDEX,100,100,100, 0
/RGB,INDEX, 80, 80, 80,13
/RGB,INDEX, 60, 60, 60,14
/RGB,INDEX, 0, 0, 0,15
SAVE
lab1.mac
key=1
lab1
key=2
lab1
key=1
lab1
key=1
PLDISP,1
SAVE
FINISH
! /EXIT,ALL
