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/BATCH
/COM,ANSYS RELEASE Release 17.0      BUILD 17.0      UP20151214       14:50:49
/input,menust,tmp,''
/GST,ON
/PLO,INFO,3
/GRO,CURL,ON
/CPLANE,1
WPSTYLE,,,,,,,,0
/NOPR
KEYW,PR_SET,1
KEYW,PR_STRUC,1
KEYW,PR_THERM,0
KEYW,PR_FLUID,0
KEYW,PR_ELMAG,0
KEYW,MAGNOD,0
KEYW,MAGEDG,0
KEYW,MAGHFE,0
KEYW,MAGELC,0
KEYW,PR_MULTI,0
/GO
/COM,
/COM,Preferences for GUI filtering have been set to display:
/COM,  Structural
/NOPR
KEYW,PR_SET,1
KEYW,PR_STRUC,1
KEYW,PR_THERM,1
KEYW,PR_FLUID,1
KEYW,PR_ELMAG,1
KEYW,MAGNOD,1
KEYW,MAGEDG,1
KEYW,MAGHFE,1
KEYW,MAGELC,1
KEYW,PR_MULTI,4
/GO
/COM,
/COM,Preferences for GUI filtering have been set to display:
/COM,  Structural
/COM,  Thermal
/COM,  ANSYS Fluid
/COM,  Magnetic-Nodal
/COM,  Magnetic-Edge
/COM,  High Frequency
/COM,  Electric
*SET,H,2
*SET,B,6
*SET,L,30
*SET,alfa1,1.9e-5
*SET,alfa2,0.1e-5
*SET,E1,2.16e5
*SET,mu1,0.25
*SET,E2,1.5e5
*SET,mu2,0.25
*SET,dT,100
/PREP7
ET,1,PLANE183
MP,EX,1,E1
MP,PRXY,1,mu
MP,ALPX,1,alfa1
MP,REFT,1,0
BLC4,0,0,b,h2
BLC4,0,0,b,h2
*SET,H2,12/11
*SET,H1,10/11
BLC4,0,0,b,h2
BLC4,0,h2,b,h1
NUMMRG,ALL
LESIZE,1,,,2
MSHAPE,0,2D
MSHKEY,1
AMESH,ALL
EXTOPT,ESIZE,30
EXTOPT,ATTR,1
TYPE,   2
EXTOPT,ESIZE,30
EXTOPT,ATTR,1
TYPE,   2
ET,2,PLANE183
MP,EX,2,E2
MP,PRXY,1,mu1
MP,PRXY,2,mu2
MP,ALPX,2,alfa2
MP,REFT,2,0
EXTOPT,ESIZE,30
EXTOPT,ATTR,1
TYPE,   2
GPLOT
! VEXT,ALL,,,0,0,-L
NUMMRG,ALL
LESIZE,1,,,2
MSHAPE,0,2D
MSHKEY,1
AMESH,ALL
TYPE,   1
EXTOPT,ESIZE,30,0,
EXTOPT,ACLEAR,0
EXTOPT,ATTR,1,0,0
REAL,_Z4
ESYS,0
TYPE,   1
EXTOPT,ESIZE,30,0,
EXTOPT,ACLEAR,0
EXTOPT,ATTR,1,0,0
REAL,_Z4
ESYS,0
GPLOT
VEXT,ALL,,,0,0,-L
GPLOT
ASEL,S,Loc,Z,0
DA,ALL,ALL,0
ALLSEL,ALL
BF,ALL,TEMP,dT
ANTYPE,0
NLGEOM,1
NSUBST,100,1000,10
OUTRES,ERASE
OUTRES,ALL,ALL
TIME,1
FINISH
/SOL
/STATUS,SOLU
SOLVE
FINISH
/POST1
PLDISP,1
GPLOT
PRNSOL,EPTH,PRIN
PRNSOL,EPTH,PRIN
PRNSOL,EPTH,PRIN
/EFACET,1
PLNSOL, EPTH,EQV, 0,1.0
/EFACET,1
PLNSOL, BFE,TEMP, 0,1.0
/EFACET,1
PLNSOL, BFE,TEMP, 0,1.0
GPLOT
NPLOT
FINISH
/PREP7
ET,2,SOLID186
EXTOPT,ESIZE,30
EXTOPT,ATTR,1
TYPE,   2
GPLOT
NUMMRG,ALL
LESIZE,1,,,2
MSHAPE,0,2D
MSHKEY,1
! AMESH,ALL
! /clear
! /clear
! /BATCH
/COM,ANSYS RELEASE Release 17.0      BUILD 17.0      UP20151214       14:50:49
/input,menust,tmp,''
/GST,ON
/PLO,INFO,3
/GRO,CURL,ON
/CPLANE,1
WPSTYLE,,,,,,,,0
/NOPR
KEYW,PR_SET,1
KEYW,PR_STRUC,1
KEYW,PR_THERM,0
KEYW,PR_FLUID,0
KEYW,PR_ELMAG,0
KEYW,MAGNOD,0
KEYW,MAGEDG,0
KEYW,MAGHFE,0
KEYW,MAGELC,0
KEYW,PR_MULTI,0
/GO
/COM,
/COM,Preferences for GUI filtering have been set to display:
/COM,  Structural
/NOPR
KEYW,PR_SET,1
KEYW,PR_STRUC,1
KEYW,PR_THERM,1
KEYW,PR_FLUID,1
KEYW,PR_ELMAG,1
KEYW,MAGNOD,1
KEYW,MAGEDG,1
KEYW,MAGHFE,1
KEYW,MAGELC,1
KEYW,PR_MULTI,4
/GO
/COM,
/COM,Preferences for GUI filtering have been set to display:
/COM,  Structural
/COM,  Thermal
/COM,  ANSYS Fluid
/COM,  Magnetic-Nodal
/COM,  Magnetic-Edge
/COM,  High Frequency
/COM,  Electric
*SET,H,2
*SET,B,6
*SET,L,30
*SET,alfa1,1.9e-5
*SET,alfa2,0.1e-5
*SET,E1,2.16e5
*SET,mu1,0.25
*SET,E2,1.5e5
*SET,mu2,0.25
*SET,dT,100
ET,1,PLANE183
MP,EX,1,E1
! MP,PRXY,1,mu
MP,ALPX,1,alfa1
MP,REFT,1,0
BLC4,0,0,b,h2
BLC4,0,0,b,h2
*SET,H2,12/11
*SET,H1,10/11
RESUME
/COM,ANSYS RELEASE Release 17.0      BUILD 17.0      UP20151214       15:17:26
RESUME
/COM,ANSYS RELEASE Release 17.0      BUILD 17.0      UP20151214       15:17:29
FINISH
! /EXIT,NOSAV
/BATCH
/COM,ANSYS RELEASE Release 17.0      BUILD 17.0      UP20151214       15:17:40
/input,menust,tmp,''
/GST,ON
/PLO,INFO,3
/GRO,CURL,ON
/CPLANE,1
WPSTYLE,,,,,,,,0
/COM,ANSYS RELEASE Release 17.0      BUILD 17.0      UP20151214       14:50:49
/input,menust,tmp,''
/GST,ON
/PLO,INFO,3
/GRO,CURL,ON
/CPLANE,1
WPSTYLE,,,,,,,,0
/NOPR
KEYW,PR_SET,1
KEYW,PR_STRUC,1
KEYW,PR_THERM,0
KEYW,PR_FLUID,0
KEYW,PR_ELMAG,0
KEYW,MAGNOD,0
KEYW,MAGEDG,0
KEYW,MAGHFE,0
KEYW,MAGELC,0
KEYW,PR_MULTI,0
/GO
/COM,
/COM,Preferences for GUI filtering have been set to display:
/COM,  Structural
/NOPR
KEYW,PR_SET,1
KEYW,PR_STRUC,1
KEYW,PR_THERM,1
KEYW,PR_FLUID,1
KEYW,PR_ELMAG,1
KEYW,MAGNOD,1
KEYW,MAGEDG,1
KEYW,MAGHFE,1
KEYW,MAGELC,1
KEYW,PR_MULTI,4
/GO
/COM,
/COM,Preferences for GUI filtering have been set to display:
/COM,  Structural
/COM,  Thermal
/COM,  ANSYS Fluid
/COM,  Magnetic-Nodal
/COM,  Magnetic-Edge
/COM,  High Frequency
/COM,  Electric
*SET,H,2
*SET,B,6
*SET,L,30
*SET,alfa1,1.9e-5
*SET,alfa2,0.1e-5
*SET,E1,2.16e5
*SET,mu1,0.25
*SET,E2,1.5e5
*SET,mu2,0.25
*SET,dT,100
/PREP7
ET,1,PLANE183
MP,EX,1,E1
MP,PRXY,1,mu
MP,ALPX,1,alfa1
MP,REFT,1,0
BLC4,0,0,b,h2
BLC4,0,0,b,h2
*SET,H2,12/11
*SET,H1,10/11
GPLOT
MP,PRXY,1,mu1
ET,2,186
MP,EX,2,E2
MP,PRXY,2,mu2
MP,PRXY,2,mu2
MP,ALPX,1,alfa1
MP,ALPX,2,alfa2
MP,REFT,2,0
BLC4,0,0,b,h2
BLC4,0,h2,b,h1
NUMMRG,ALL
LESIZE,1,,,2
MSHAPE,0,2D
MSHKEY,1
AMESH,ALL
SAVE
EXTOPT,ESIZE,30
EXTOPT,ATTR,1
TYPE,   2
GPLOT
EPLOT
EXTOPT,ESIZE,30
EXTOPT,ATTR,1
TYPE,   2
VEXT,ALL,,,0,0,-L
ASEL,S,Loc,Z,0
DA,ALL,ALL,0
ALLSEL,ALL
GPLOT
SAVE
BF,ALL,TEMP,dT
ANTYPE,0
NLGEOM,1
NSUBST,100,1000,10
OUTRES,ERASE
OUTRES,ALL,ALL
TIME,1
FINISH
/SOL
/STATUS,SOLU
SOLVE
FINISH
/POST1
PLDISP,1
/DSCALE,ALL,AUTO
PLDISP,1
/EFACET,1
PLNSOL, BFE,TEMP, 0,1.0
/EFACET,1
PLNSOL, U,SUM, 0,1.0
/EFACET,1
PLNSOL, EPTH,EQV, 0,1.0
GPLOT
EPLOT
/PSF,DEFA, ,1,0,1
/PBF,DEFA, ,1
/PSYMB,CS,0
/PSYMB,NDIR,0
/PSYMB,ESYS,0
/PSYMB,LDIV,0
/PSYMB,LDIR,0
/PSYMB,ADIR,0
/PSYMB,ECON,0
/PSYMB,XNODE,0
/PSYMB,DOT,1
/PSYMB,PCONV,
/PSYMB,LAYR,0
/PSYMB,FBCS,0
/PBC,ALL,,1
/PBC,NFOR,,0
/PBC,NMOM,,0
/PBC,RFOR,,0
/PBC,RMOM,,0
/PBC,PATH,,0
/EFACET,1
PLNSOL, EPTH,EQV, 0,1.0
/EFACET,1
PLNSOL, EPTO,EQV, 0,1.0
/DSCALE,ALL,AUTO
/EFACET,1
PLNSOL, EPTO,EQV, 0,1.0
/DSCALE,ALL,AUTO
/EFACET,1
PLNSOL, EPTO,EQV, 1,1.0
/EFACET,1
PLNSOL, EPTO,EQV, 1,1.0
FINISH
/PREP7
/NUMBER,0
SAVE
FINISH
! /EXIT,ALL
